// SBML level 2 version 3

model Test1()

  // Compartments:
  compartment cell = 1;

  // Species:
  species S1 in cell = 4.6052/cell; S1 is "SF()";
  species E in cell = 2.3026/cell; E is "E()";
  species ES in cell = 0; ES is "ES()";
  species P in cell = 0; P is "P()";

  // Parameters:
  S0 = 4.6052;
  E0 = 2.3026;
  log_k1 = -4.6052;
  log_k2 = 0;
  log_k3 = 0;
  _rateLaw1 = 10^log_k1;
  _rateLaw2 = 10^log_k2;
  _rateLaw3 = 10^log_k3;

  // Assignment rules:
  SF := 0 + S1;

  // Reactions:
  R1: S1 + E => ES; _rateLaw1*S1*E;
  R2: ES => S1 + E; _rateLaw2*ES;
  R3: ES => E + P; _rateLaw3*ES;

  // Unit definitions:
  unit substance = item;
end
